# УТОЧНЕНИЕ ДАННЫХ
# РАСЧЕТ ДЛИН БАКОВ
# Масса стартовая
M_0 := 26902.1
# Масса конечная
M_к := 3781.6
# Плотность окислителя
ρ_ок := 1135
# Плотность горючего
ρ_г := 830
# Диаметр баков
D := 1.6  # М
# Радиусы днищ
R_днища := 1.16  # М
# Вылет днищ
h := 0.2
# Масса топлива
M_т := M_0 - M_к = 23120.5  # Кг
# Стехиометрическое соотношение
v_0 := 3.41
# Коэффициэнт избытка окислителя
α := 0.9
v := v_0*α = 3.069
# Масса окислителя
M_ок := v/(1 + v)*M_т = 17438.4  # Кг
# Масса горючего
M_г := 1/(1 + v)*M_т = 5682.11  # Кг
# Объем окислителя
V_ок := M_ок/ρ_ок = 15.3642  # М^3
# Объем горючего
V_г := M_г/ρ_г = 6.84591  # М^3
# Объем бака окислителя
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V_бо := V_ок + 5 %*V_ок + 2 %*V_ок = 16.4397  # М^3
# Объем бака горючего
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V_бг := V_г + 5 %*V_г + 2 %*V_г = 7.32513  # М^3
V_д := integral(R_днища^2 - (x + R_днища - D*h)^2, x = 0 .. D*h)*3.14 = 0.338685  # М^3
# Объем цилиндрической части бака окислителя
V_цо := V_бо - 2*V_д = 15.7623
# Длина цилиндрической части бака окислителя
L_цо := 4*V_цо/(π*D^2) = 7.83955
# Длина бака окислителя
L_бо := L_цо + 2*h*D = 8.47955
# Объем цилиндрической части бака горючего
V_цг := V_бг - 2*V_д = 6.64776
# Длина цилиндрической части бака горючего
L_цг := 4*V_цг/(π*D^2) = 3.30632
# Длина бака горючего
L_бг := L_цг + 2*h*D = 3.94632
# РАСЧЕТ ДВИГАТЕЛЯ
# Время активного участка
t_дв := 132.2
# Колличество камер
n := 4
# приведенная длина камеры сгорания:
# открытая схема -  2-2.5
# схема с дожиганием -  0.2-1
l_к.пр := 0.5  # М
R := 323.74
# Температура в крит сечении
T_k := 3678
# Давление
# В камере сгорания
# Выходное сечение
ρ_k := 20  # МПа
ρ_a := 0.08  # МПа
# Расход 1 камеры
m := (M_г + M_ок)/(n*t_дв) = 43.7226
# Длина камеры сгорания
l_к := 1/4*l_к.пр = 0.125  # М
# Изоэнтропа:
k := 1.121
K_0 := (2/(k + 1))^((k + 1)/(2*(k - 1)))*sqrt(k) = 0.632726
# Диаметр критического сечения сопла
d_кр := sqrt(4*m*sqrt(R*T_k)/(n*0.98*π*K_0*ρ_k*10^6)) = 0.034994
ε := ρ_a/ρ_k = 0.004
# Относительная площадь выходного сечения сопла
f_a := (2/(k + 1))^((k + 1)/(2*(k - 1)))*sqrt((k - 1)/2)/sqrt(ε^(2/k) - ε^((k + 1)/k)) = 30.2194
# диаметр выходного сечения сопла камеры сгорания
d_a := d_кр*sqrt(f_a) = 0.19237  # М
# Длина сопла
l_c := d_a
# Длина двигательной установки
l_дв := 1.05*(l_c + l_к) = 0.333238  # М
# РАСЧЕТ РАДИУСОВ МАГИСТРАЛЬНЫХ И ТОННЕЛЬНЫХ ТРУБ
# Массовый расход
m_ок := M_ок/t_дв = 131.909  # Кг/с
m_г := M_г/t_дв = 42.9812  # Кг/с
# V.k=(6…10) м/с – скорость движения компонента в магистрали (меньшие значения для компонентов с низкой плотностью)
V_к := 9
V_г := 6
# Радиус магистрали
r_м.ок := sqrt(m_ок/(π*ρ_ок*V_к)) = 0.0641126  # М  # Окислитель
r_м.г := sqrt(m_г/(π*ρ_г*V_г)) = 0.0524143  # М  # Горючее
# J от 0,2 до 0,3
J := 0.25
Δ_г := J*r_м.г = 0.0131036  # М
Δ_ок := J*r_м.ок = 0.0160281  # М
# Внешний радиус тонельной трубы
r_в.ок := r_м.ок + Δ_ок = 0.0801407  # М
r_в.г := r_м.г + Δ_г = 0.0655178  # М
p_a := 0.08
R_a := 292.14
T_a := 2390
R_k := 328.26
p_k := 20
T_k := 3867
n := ln(p_k/p_a)/(ln(p_k/p_a) + ln(R_a*T_a/(R_k*T_k))) = 1.1214
