# Камера: | Срез сопла:
p_k := 20
p_a := 0.08
R_k := 328.26
R_a := 292.14
T_k := 3867
T_a := 2390
# Показатель изоэнтропы: | (или показатель процесса расширения)
n := ln(p_k/p_a)/(ln(p_k/p_a) + ln(R_a*T_a/(R_k*T_k))) = 1.1214
